# Title: MATHCAD 15 WORKSHEET
# Worksheet setting: ORIGIN = 1
# [area: REFERENCE FILES]
# [reference: Library of Constants and Units and Functions.xmcd]
# [reference: REF - NDAG Energy Group Boundaries -  1102N 709N 180N 172N 162PDAG 24G and 252N 238N 200N 56N 47G 19G.XMCD]
# Special functions added to MathCAD:
#
# Z := 50  AMN := 113  ZAID := 1000*Z + AMN  isom := 0  symbol := "Sn"
#
# MMI_ZA(Z, AMN) = 112.905 gm/mol gives standard isotopic mass (gram/mole) for a (Z,A) combination
#
# MI_ZA(Z, AMN) = 1.87483e-22 gm gives standard isotopic mass for a (Z,A) combination
#
# MMI_ZAID(ZAID) = 112.905 gm/mol gives standard isotopic mass (gram/mole) for a ZAID value
#
# MI_ZAID(ZAID) = 1.87483e-22 gm gives standard isotopic mass for a ZAID value
#
# MME_Z(Z) = 118.71 gm/mol gives standard elemental mass (gram/mole) for a Z value
#
# ME_Z(Z) = 1.97123e-25 kg gives standard elemental mass for a Z value
#
# MME_symbol(symbol) = 118.71 gm/mol gives standard elemental mass (gram/mole) for a specific element symbol such as "Sn" or "K" or "Na".
#
# ME_symbol(symbol) = 1.97123e-22 gm gives standard elemental mass for a specific element symbol.
#
# Halflife: THALF_ZAID(ZAID) = 115.08 day gives the half-life (unit: seconds) for a specified ZAID.
#
# Halflife: THALF_ZAI(Z, AMN, isom) = 115.08 day gives the half-life (unit: seconds) for a specified (Z,A,isom).
#
# Halflife of 137mBa: THALF_ZAI(56, 137, 1) = 2.552 min
#
# Activity per unit mass of U-234: Act_um_ZAID(92234) = 230217494 Bq/gm
#
# Activity per unit mass of Th-232: Act_um_ZAI(90, 232, 0) = 4071.87 Bq/gm
#
# Activity per unit mass of Ba-137m: Act_um_ZAI(56, 137, 1) = 1.99123e19 Bq/gm
#
# AuM_ZAI(90, 232, 0) = 4071.87 Bq/gm
#
# Clearance levels for disposal of bulk quantities of radioactive material (IAEA BSS 2014):
#
# CL_ZAI(27, 60, 0) = 0.1 Bq*gm^-1
#
# CL_ZAID(27060) = 0.1 Bq*gm^-1
#
# Time-to-clearance
# Z := Z_Co  AMN := 60  ISOM := 0  AuM := 5500*Bq/gm
#
# TTCL_ZAI_AuM(Z, AMN, ISOM, AuM) = 83.0095 yr
#
# augment(Z_elements_stable, Symbol_elements_stable, Abundance_element_Z(Z_elements_stable)/ppm) = [ 1, "H", 1400; 2, "He", 0.008; 3, "Li", 22; 4, "Be", 3.1; 5, "B", 17; 6, "C", 3240; 7, "N", 83; 8, "O", 461000; 9, "F", 600; 10, "Ne", 0.0051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 ]
#
# Symbols:
#
# Symbol_Z(41) = "Nb"
#
# Symbol_ZA(41, 94) = "Nb-94"
#
# Symbol_ZAI(43, 99, 1) = "Tc-99m"
#
# By using these functions in work, improved values of:
# * Standard isotopic masses
# * Standard elemental masses
# * Halflives of radionuclides
# will automatically filter through all worksheets, when the updated values are put in the appropriate reference tables.
## Terrestrial abundance, in upper continental crust of the planet earth, of the stable and nearly stable elements:
Abundance_elements_earth_UCC = [
    1, "H", 1400;
    2, "He", 0.008;
    3, "Li", 22;
    4, "Be", 3.1;
    5, "B", 17;
    6, "C", 3240;
    7, "N", 83;
    8, "O", 461000;
    9, "F", 600;
    10, "Ne", 0.0051
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]
Abundance_element_Z([7; 9; 11; 13]) = [8.3e-5; 0.0006; 0.02567; 0.0823]
Element[63] = "Eu"
Symbol[63] = "Eu"
Element_Z(55) = "Cs"
Z_symbol("Eu") = 63
Abundance_element_Z(Z_elements_stable) = [
    1400; 0.008; 22; 3.1; 17; 3240; 83; 461000; 600; 0.0051
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] ppm
Symbol_element_Z(8) = "O"
Element_symbol_Z(34) = "Se"
Symbol_element_Z(Z_elements) = [
    "H"; "He"; "Li"; "Be"; "B"; "C"; "N"; "O"; "F"; "Ne"
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]
Element_symbol_Z(Z_elements) = [
    "H"; "He"; "Li"; "Be"; "B"; "C"; "N"; "O"; "F"; "Ne"
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]
i_odd := 1, 3 .. 81
i_even := 2, 4 .. 82
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Abundance_element_Z(Z_Ag)/Abundance_element_Z(Z_Ir) = 3750
Abundance_element_Z(Z_Os)/Abundance_element_Z(Z_Ir) = 2.5
sum(Abundance_element_Z(i_even), i_even) = 87.1715 %
sum(Abundance_element_Z(i_odd), i_odd) = 13.3878 %
sum(Abundance_element_Z(i_even), i_even)/sum(Abundance_element_Z(i_odd), i_odd) = 6.51128
Z := [1; 20]
AMN := [3; 45]
ISOM := [0; 0]
AuM := [51; 51]*Bq/gm
CLI(Z, AMN, ISOM, AuM) = 1.02
RS(Z, AMN, ISOM, AuM) = "Too radioactive for clearance"
## Title
# [component: outputs data_u233]
# [component: outputs data_u235]
# [component: outputs data_pu239]
eng_u233 := data_u233[:, 1]*MeV
fny_u233 := data_u233[:, 2]
eng_u235 := data_u235[:, 1]*MeV
fny_u235 := data_u235[:, 2]
eng_pu239 := data_pu239[:, 1]*MeV
fny_pu239 := data_pu239[:, 2]
Y_fny_U233(E) := linterp(eng_u233, fny_u233, E)
Y_fny_U235(E) := linterp(eng_u235, fny_u235, E)
Y_fny_Pu239(E) := linterp(eng_pu239, fny_pu239, E)
E := logspace(10^-11, 20, 999)*MeV
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